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/COM,ANSYS RELEASE Release 19.1      BUILD 19.1      UP20180418       09:51:26
/PREP7
/TITLE,PyAnsysDebug
*IF,_CDRDOFF,EQ,1,THEN     !if solid model was read in
_CDRDOFF=             !reset flag, numoffs already performed
*ELSE              !offset database for the following FE model
NUMOFF,NODE,     4961
NUMOFF,ELEM,     1000
NUMOFF,TYPE,        1
*ENDIF
*SET,ANSINTER_,  2.000000000000
*SET,_BUTTON ,  1.000000000000
*SET,_GUI_CLR_BG,' systemButtonFace               '
*SET,_GUI_CLR_FG,' systemButtonText               '
*SET,_GUI_CLR_INFOBG,' systemInfoBackground           '
*SET,_GUI_CLR_SEL,' systemHighlight                '
*SET,_GUI_CLR_SELBG,' systemHighlight                '
*SET,_GUI_CLR_SELFG,' systemHighlightText            '
*SET,_GUI_CLR_WIN,' systemWindow                   '
*SET,_GUI_FNT_FMLY,'Arial                           '
*SET,_GUI_FNT_PXLS,  16.00000000000
*SET,_GUI_FNT_SLNT,'r                               '
*SET,_GUI_FNT_WEGT,'medium                          '
*SET,_REMOTE_IP,'localhost                       '
*SET,_RETURN ,  0.000000000000
*SET,_STATUS ,  0.000000000000
*SET,_UIQR   ,  1.000000000000
*SET,_WALLSTRT,  9.845000000000
*SET,_WB_PROJECTSCRATCH_DIR(1,       1,       1),''
*SET,_WB_SOLVERFILES_DIR(1,       1,       1),''
*SET,_WB_USERFILES_DIR(1,       1,       1),''
*SET,_Z1     ,  0.000000000000
*SET,_Z2     ,  0.000000000000
DOF,DELETE
ET,        1,200
KEYOP,        1, 1,       11
NBLOCK,6,SOLID,      4961,      4961
(3i9,6e21.13e3)
        1        0        0 1.0000000000000E-001 9.0000000000000E-001 9.0000000000000E-001
        2        0        0 1.0000000000000E-001 8.0000000000000E-001 9.0000000000000E-001
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